// SBML level 2 version 4

model petab()

  // Compartments:
  compartment cytoplasm = 1;

  // Species:
  species E in cytoplasm = 0;
  species S in cytoplasm = 100/cytoplasm;
  species ES in cytoplasm = 0;
  species P in cytoplasm = 0;

  // Parameters:
  kon = 1 litre_per_mole_per_second;
  koff = 0.1 per_second;
  kcat = 1 per_second;
  kprodS = 2 mole_per_litre_per_second;
  kdegS = 0.1 per_second;
  Eadd = 1 mole_per_litre;

  // Reactions:
  Productionofsubstrate: => S; kprodS*cytoplasm;
  Degradationofsubstrate: S => ; kdegS*S*cytoplasm;
  productionofcomplex: S + E => ES; kon*E*S*cytoplasm;
  decayofcomplex: ES => S + E; koff*ES*cytoplasm;
  productionofproduct: ES => E + P; kcat*ES*cytoplasm;

  // Unit definitions:
  unit per_second = 1 / second;
  unit per_mole = 1 / mole;
  unit per_mole_per_second = 1 / (mole * second);
  unit litre_per_mole_per_second = litre / (mole * second);
  unit litre2_per_mole2_per_second = litre^2 / (mole^2 * second);
  unit mole_per_litre_per_second = mole / (litre * second);
  unit mole_per_litre = mole / litre;
  unit identity = dimensionless;
end
