// SBML level 2 version 4

model petab()

  // Compartments:
  compartment cytoplasm = 1;

  // Species:
  species A in cytoplasm = 1/cytoplasm;
  species B in cytoplasm = 1e-12/cytoplasm;
  species C in cytoplasm = 1e-12/cytoplasm;

  // Parameters:
  k_AB = 1 per_second;
  k_BC = 0.1 per_second;

  // Reactions:
  AtoB: A => B; k_AB*A*cytoplasm;
  BtoC: B => C; k_BC*B*cytoplasm;

  // Unit definitions:
  unit per_second = 1 / second;
  unit per_mole = 1 / mole;
  unit per_mole_per_second = 1 / (mole * second);
  unit litre_per_mole_per_second = litre / (mole * second);
  unit litre2_per_mole2_per_second = litre^2 / (mole^2 * second);
  unit mole_per_litre_per_second = mole / (litre * second);
  unit mole_per_litre = mole / litre;
  unit mole_per_second = mole / second;
  unit identity = dimensionless;
end
