// SBML level 2 version 4

model petab()

  // Compartments:
  compartment cytoplasm = 1;

  // Species:
  species E in cytoplasm = 1/cytoplasm;
  species S in cytoplasm = 100/cytoplasm;
  species ES in cytoplasm = 1e-12/cytoplasm;
  species P in cytoplasm = 1e-12/cytoplasm;

  // Parameters:
  kon = 1 litre_per_mole_per_second;
  koff = 0.1 per_second;
  kcat = 0.1 per_second;
  addES = 30 mole_per_litre;

  // Reactions:
  productionofcomplex: E + S => ES; kon*E*S*cytoplasm;
  decayofcomplex: ES => E + S; koff*ES*cytoplasm;
  productionofproduct: ES => E + P; kcat*ES*cytoplasm;

  // Events:
  at (time >= 20): ES = 0;
  at (time >= 50): ES = addES;

  // Unit definitions:
  unit per_second = 1 / second;
  unit per_mole = 1 / mole;
  unit per_mole_per_second = 1 / (mole * second);
  unit litre_per_mole_per_second = litre / (mole * second);
  unit litre2_per_mole2_per_second = litre^2 / (mole^2 * second);
  unit mole_per_litre_per_second = mole / (litre * second);
  unit mole_per_litre = mole / litre;
  unit mole_per_second = mole / second;
  unit identity = dimensionless;
end
