// SBML level 2 version 4

model petab()

  // Compartments:
  compartment cytoplasm = 1;

  // Species:
  species R1 in cytoplasm = 1/cytoplasm;
  species R2 in cytoplasm = 1/cytoplasm;
  species R1R2 in cytoplasm = 1/cytoplasm;
  species ERK in cytoplasm = 1/cytoplasm;
  species ligand in cytoplasm = 1/cytoplasm;

  // Parameters:
  k1 = 0.1 identity;
  k2 = 0.325 identity;
  k3 = 0.55 identity;
  k5 = 1 identity;

  // Initial assignments:
  pERK = ERK*k5*k_ratio/k5;
  k4 = k5*k_ratio;

  // Reactions:
  : R1 + R2 => R1R2; k1*R1*R2*ligand*cytoplasm;  // modifiers: ligand
  : R1R2 => R1 + R2; k2*R1R2*cytoplasm;
  : ERK => pERK; k3*ERK*R1R2*cytoplasm;  // modifiers: R1R2
  ERKtopERKbasal: ERK => pERK; k4*ERK*cytoplasm;
  pERKtoERK: pERK => ERK; k5*pERK*cytoplasm;
  : => ligand; 0*cytoplasm;

  // Events:
  at (time >= 0): ligand = 1;

  // Unit definitions:
  unit per_second = 1 / second;
  unit per_mole = 1 / mole;
  unit per_mole_per_second = 1 / (mole * second);
  unit litre_per_mole_per_second = litre / (mole * second);
  unit litre2_per_mole2_per_second = litre^2 / (mole^2 * second);
  unit mole_per_litre_per_second = mole / (litre * second);
  unit mole_per_litre = mole / litre;
  unit mole_per_second = mole / second;
  unit identity = dimensionless;
end
